// SBML level 2 version 4

model SepsisAMPK()

  // Compartments:
  compartment default = 1 volume;
  compartment Cell in default = 1 volume;

  // Species:
  // rheb is not active when bound to GDP https://doi.org/10.1016/j.str.2012.06.013
  species Rheb in Cell = 1;
  species s66 in Cell = 0; s66 is "TSC2";
  species s2 in Cell = 0; s2 is "AMPK";
  species s65 in Cell = 1; s65 is "TSC2";
  species AMP in Cell = 1;
  species s1 in Cell = 1; s1 is "AMPK";
  species mTORC1_rheb_P in Cell = 0; mTORC1_rheb_P is "mTORC1 (rheb+P)";
  species mTORC1 in Cell = 1;
  species mTORC1_P in Cell = 0; mTORC1_P is "mTORC1(P)";
  species mTORC1_rheb in Cell = 0; mTORC1_rheb is "mTORC1 (rheb)";
  // HIF1a will always have a non-zero steady state because of the 0th order rate law for production
  species HIF1_alpha in Cell = 0;
  species HIF1_alpha_degradation in Cell = 0; HIF1_alpha_degradation is "HIF1_alpha (degradation)";
  species HIF1_alpha_production in Cell = 0; HIF1_alpha_production is "HIF1_alpha (production)";

  // Reactions:
  // AMPK is controlled by AMP/ATP ratios. As AMP increases, AMPK is phosphorylated to promote ATP production through OXPHOS https://doi.org/10.1002/cbin.10915
  AMPK_Phosphorylation: s1 => s2; v1*s1*AMP/(k1 + s1);  // modifiers: AMP
    v1 = 1 substance; k1 = 1 substance;
  // RHEB binds to mTOR distally from the kinase active site, yet causes a global conformational change that allosterically realigns active-site residues, accelerating catalysis https://doi.org/10.1038/nature25023
  mTORC1_activation: mTORC1 + Rheb -> mTORC1_rheb; mTORC1*Rheb*k4;
    k4 = 1 substance;
  mTORC1_Phosphorylation_1: mTORC1 => mTORC1_P; mTORC1_Phosphorylation_1_v5*mTORC1*s2/(mTORC1_Phosphorylation_1_k5 + mTORC1); mTORC1_Phosphorylation_1 is "mTORC1 Phosphorylation (1)";  // modifiers: s2
    mTORC1_Phosphorylation_1_v5 = 1 substance; mTORC1_Phosphorylation_1_k5 = 1 substance;
  mTORC1_Phosphorylation_2: mTORC1_rheb => mTORC1_rheb_P; mTORC1_Phosphorylation_2_k5*mTORC1_rheb*s2/(mTORC1_Phosphorylation_2_k5 + mTORC1_rheb); mTORC1_Phosphorylation_2 is "mTORC1 Phosphorylation (2)";  // modifiers: s2
    mTORC1_Phosphorylation_2_k5 = 1 substance; mTORC1_Phosphorylation_2_v5 = 1 substance;
  TSC2_activation: s65 => s66; v2*s65*s2/(k2 + s65);  // modifiers: s2
    v2 = 1 substance; k2 = 1 substance;
  Rheb_inhibition: Rheb => Rheb; v3*Rheb*s66/(k3 + Rheb);  // modifiers: s66
    v3 = 1 substance; k3 = 1 substance;
  // Under normal oxygen conditions, HIF1a is degraded https://doi.org/10.1038/cdd.2008.12
  HIF1_degradation: HIF1_alpha => HIF1_alpha_degradation; v7*HIF1_alpha/(k7*(1 + mTORC1_rheb) + HIF1_alpha);  // modifiers: mTORC1_rheb
    v7 = 10 substance; k7 = 1 substance;
  // HIF1a is a constitutively activated protein
  HIF1_formation: HIF1_alpha_production => HIF1_alpha; k6;
    k6 = 0.1 substance;

  // Unit definitions:
  unit substance = mole;
  unit volume = litre;
  unit area = metre^2;
  unit length = metre;
  unit time = second;
end
